vr 28 nov 2025 10:45:25 CET
;; 1. Based on: run00
;; 2. Description: CeftriaxPro Base Model - One Compartment
;; x1. TEAM2
;; 2025-11-24
$PROBLEM    CeftriaxPro Base Model Development
$INPUT      ID TIME DOSE=AMT RATE CONC=DV CONC_ID BW SEX ALB SCR eGFR
            AGE ETHNI PR DVID CMT MDV EVID
$DATA      dataset.csv IGNORE=@ IGNORE=(CONC_ID.EQ.1)
 ;; ignores rows showing total plasma concentration
$SUBROUTINE ADVAN1 ;; 1-compartment model
            TRANS2 ;; CL,V
$PK
TVCL = THETA(1)
  CL = TVCL * EXP(ETA(1))
 TVV = THETA(2)
   V = TVV * EXP(ETA(2))
   K = CL/V
  S2 = V/1                ;; scale prediction based on DOSE (mmol) and DV (mmol/L)

$THETA  (0,1) ; ; based on phase 1 trial
 (0,70) ; _; based on phase 1 trial
; explore dataset & literature, SAME order as PK
$OMEGA  1  ;         __  ; not yet known, outcome picked for next models, put a relatively small number
 1  ;        ___  ; not yet known, outcome picked for next models
 ;; variance covariance matrix for interindividual variability
$SIGMA  1  ;       ____  ; EPS(1) for proportional error, not yet known, outcome picked for next models
 1  ;      _____  ; EPS(2) for additive error, not yet known, outcome picked for next models
;; variance covariance matrix for residual error
$ERROR
IPRED = F
Y = IPRED + IPRED*ERR(1) + ERR(2)
W = SQRT((IPRED*SQRT(SIGMA(1,1)))**2 + (SQRT(SIGMA(2,2)))**2)
IRES  = CONC - IPRED
IWRES = IRES / W

$ESTIMATION METHOD=1 INTERACTION ;; FOCE-I
            MAXEVAL=9999 SIG=3 PRINT=5
$COVARIANCE PRINT=E ;; second derivatives using -2log(likelihood),blank means sandwich method
 ;; output table for standard outcomes
$TABLE      ID TIME DV EVID PRED IPRED WRES RES CWRES NOPRINT
            ONEHEADER FILE=run00_sdtab
 ;; output table for PK parameters
$TABLE      ID CL V K NOPRINT NOAPPEND ONEHEADER FILE=run00_patab
 ;; output table for categorical covariates
$TABLE      ID SEX ETHNI NOPRINT NOAPPEND ONEHEADER FILE=run00_catab
 ;; output table for continuous covariates
$TABLE      ID BW ALB SCR eGFR AGE NOPRINT NOAPPEND ONEHEADER
            FILE=run00_cotab

NM-TRAN MESSAGES
 WARNINGS AND ERRORS (IF ANY) FOR PROBLEM    1
 (WARNING  2) NM-TRAN INFERS THAT THE DATA ARE POPULATION.
 (WARNING  79) SIGMA IS USED ON THE RIGHT. WITH A SUBSEQUENT RUN, IF AN
 INITIAL ESTIMATE OF A DIAGONAL BLOCK OF SIGMA IS TO BE COMPUTED BY
 NONMEM, THAT BLOCK WILL BE SET TO AN IDENTITY MATRIX DURING THAT
 COMPUTATION. THIS COULD LEAD TO AN ARITHMETIC EXCEPTION.*
 * THE MAXIMUM NUMBER OF WARNINGS OF ONE OR MORE TYPES WAS REACHED.
 IT IS POSSIBLE THAT SOME WARNING MESSAGES WERE SUPPRESSED.
Note: Analytical 2nd Derivatives are constructed in FSUBS but are never used.
      You may insert $ABBR DERIV2=NO after the first $PROB to save FSUBS construction and compilation time

1NONLINEAR MIXED EFFECTS MODEL PROGRAM (NONMEM) VERSION 7.6.0 (nm760)
 ORIGINALLY DEVELOPED BY STUART BEAL, LEWIS SHEINER, AND ALISON BOECKMANN
 CURRENT DEVELOPERS ARE ROBERT BAUER, ICON DEVELOPMENT SOLUTIONS,
 AND ALISON BOECKMANN. IMPLEMENTATION, EFFICIENCY, AND STANDARDIZATION
 PERFORMED BY NOUS INFOSYSTEMS.
 PROBLEM NO.:         1
 CeftriaxPro Base Model Development
 TOT. NO. OF OBS RECS:      496
 TOT. NO. OF INDIVIDUALS:       33
 ONE COMPARTMENT MODEL (ADVAN1)
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 #TBLN:      1
 #METH: First Order Conditional Estimation with Interaction
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
 #TERM:
0MINIMIZATION SUCCESSFUL
 HOWEVER, PROBLEMS OCCURRED WITH THE MINIMIZATION.
 REGARD THE RESULTS OF THE ESTIMATION STEP CAREFULLY, AND ACCEPT THEM ONLY
 AFTER CHECKING THAT THE COVARIANCE STEP PRODUCES REASONABLE OUTPUT.
 NO. OF FUNCTION EVALUATIONS USED:      294
 NO. OF SIG. DIGITS IN FINAL EST.:  3.3

 ETABAR IS THE ARITHMETIC MEAN OF THE ETA-ESTIMATES,
 AND THE P-VALUE IS GIVEN FOR THE NULL HYPOTHESIS THAT THE TRUE MEAN IS 0.

 ETABAR:         3.2377E+00 -3.2380E+00
 SE:             2.4221E-01  2.4224E-01
 N:                      33          33

 P VAL.:         9.7995E-41  9.7995E-41

 ETASHRINKSD(%)  3.2303E+01  3.2300E+01
 ETASHRINKVR(%)  5.4172E+01  5.4167E+01
 EBVSHRINKSD(%)  2.9425E+01  2.9421E+01
 EBVSHRINKVR(%)  5.0191E+01  5.0186E+01
 RELATIVEINF(%)  1.0000E-10  1.0000E-10
 EPSSHRINKSD(%)  1.0000E-10  1.0000E-10
 EPSSHRINKVR(%)  1.0000E-10  1.0000E-10


 TOTAL DATA POINTS NORMALLY DISTRIBUTED (N):          496
 N*LOG(2PI) CONSTANT TO OBJECTIVE FUNCTION:    911.58702493903525
 OBJECTIVE FUNCTION VALUE WITHOUT CONSTANT:   -2084.1654479305971
 OBJECTIVE FUNCTION VALUE WITH CONSTANT:      -1172.5784229915619
 REPORTED OBJECTIVE FUNCTION DOES NOT CONTAIN CONSTANT

 TOTAL EFFECTIVE ETAS (NIND*NETA):                            66


 #TERE:
 Elapsed estimation  time in seconds:     5.71
 Elapsed covariance  time in seconds:     1.68
 Elapsed postprocess time in seconds:     0.06

 ********************               FIRST ORDER CONDITIONAL ESTIMATION WITH INTERACTION              ********************
 #OBJT:**************                       MINIMUM VALUE OF OBJECTIVE FUNCTION                      ********************
 #OBJV:********************************************         -2084.165       *********************************************

 ********************               FIRST ORDER CONDITIONAL ESTIMATION WITH INTERACTION              ********************
 ********************                             FINAL PARAMETER ESTIMATE                           ********************

 THETA - VECTOR OF FIXED EFFECTS PARAMETERS   *********
         TH 1      TH 2
         1.95E+00  3.53E+01

 OMEGA - COV MATRIX FOR RANDOM EFFECTS - ETAS  ********
         ETA1      ETA2
 ETA1
+        2.71E+01
 ETA2
+        0.00E+00  2.71E+01

 SIGMA - COV MATRIX FOR RANDOM EFFECTS - EPSILONS  ****
         EPS1      EPS2
 EPS1
+        4.77E-01
 EPS2
+        0.00E+00  2.74E-04

 OMEGA - CORR MATRIX FOR RANDOM EFFECTS - ETAS  *******
         ETA1      ETA2
 ETA1
+        5.21E+00
 ETA2
+        0.00E+00  5.21E+00

 SIGMA - CORR MATRIX FOR RANDOM EFFECTS - EPSILONS  ***
         EPS1      EPS2
 EPS1
+        6.91E-01
 EPS2
+        0.00E+00  1.65E-02

 ********************               FIRST ORDER CONDITIONAL ESTIMATION WITH INTERACTION              ********************
 ********************                            STANDARD ERROR OF ESTIMATE                          ********************

 THETA - VECTOR OF FIXED EFFECTS PARAMETERS   *********
         TH 1      TH 2
         1.14E-06  3.19E-02

 OMEGA - COV MATRIX FOR RANDOM EFFECTS - ETAS  ********
         ETA1      ETA2
 ETA1
+        1.94E+00
 ETA2
+       .........  1.94E+00

 SIGMA - COV MATRIX FOR RANDOM EFFECTS - EPSILONS  ****
         EPS1      EPS2
 EPS1
+        3.38E-04
 EPS2
+       .........  9.69E-07

 OMEGA - CORR MATRIX FOR RANDOM EFFECTS - ETAS  *******
         ETA1      ETA2
 ETA1
+        1.86E-01
 ETA2
+       .........  1.86E-01

 SIGMA - CORR MATRIX FOR RANDOM EFFECTS - EPSILONS  ***
         EPS1      EPS2
 EPS1
+        2.45E-04
 EPS2
+       .........  2.93E-05

 ********************               FIRST ORDER CONDITIONAL ESTIMATION WITH INTERACTION              ********************
 ********************                          COVARIANCE MATRIX OF ESTIMATE                         ********************

            TH 1      TH 2      OM11      OM12      OM22      SG11      SG12      SG22
 TH 1
+        1.30E-12
 TH 2
+        6.12E-09  1.02E-03
 OM11
+       -6.60E-08 -1.52E-02  3.75E+00
 OM12
+       ......... ......... ......... .........
 OM22
+       -6.60E-08 -1.52E-02  3.76E+00 .........  3.76E+00
 SG11
+        2.51E-11  9.99E-06 -1.05E-04 ......... -1.05E-04  1.15E-07
 SG12
+       ......... ......... ......... ......... ......... ......... .........
 SG22
+        2.95E-14 -2.91E-08  2.67E-07 .........  2.67E-07 -3.18E-10 .........  9.38E-13

 ********************               FIRST ORDER CONDITIONAL ESTIMATION WITH INTERACTION              ********************
 ********************                          CORRELATION MATRIX OF ESTIMATE                        ********************

            TH 1      TH 2      OM11      OM12      OM22      SG11      SG12      SG22
 TH 1
+        1.14E-06
 TH 2
+        1.68E-01  3.19E-02
 OM11
+       -2.99E-02 -2.46E-01  1.94E+00
 OM12
+       ......... ......... ......... .........
 OM22
+       -2.99E-02 -2.45E-01  1.00E+00 .........  1.94E+00
 SG11
+        6.51E-02  9.25E-01 -1.61E-01 ......... -1.60E-01  3.38E-04
 SG12
+       ......... ......... ......... ......... ......... ......... .........
 SG22
+        2.67E-02 -9.42E-01  1.43E-01 .........  1.42E-01 -9.71E-01 .........  9.69E-07
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
 ********************               FIRST ORDER CONDITIONAL ESTIMATION WITH INTERACTION              ********************
 ********************                      EIGENVALUES OF COR MATRIX OF ESTIMATE                     ********************

             1         2         3         4         5         6
         1.17E-10  1.58E-02  6.57E-02  1.01E+00  1.82E+00  3.09E+00
 Elapsed finaloutput time in seconds:     0.07
 #CPUT: Total CPU Time in Seconds,        7.576
