zo 30 nov 2025 13:51:35 CET
;; 1. Based on: run00
;; 2. Description: CeftriaxPro Base Model - Two Compartment
;; x1. TEAM2
;; 2015-11-24
$PROBLEM    CeftriaxPro Base Model Development
$INPUT      ID TIME DOSE=AMT RATE CONC=DV CONC_ID BW SEX ALB SCR eGFR
            AGE ETHNI PR DVID CMT MDV EVID
$DATA      dataset.csv IGNORE=@ IGNORE=(CONC_ID.EQ.1)
 ;; ignores rows showing total plasma concentration
$SUBROUTINE ADVAN13 ;; general nonlinear model
            TOL=9
$MODEL      NCOMP=2 ;; number of compartments
            COMP=(DOSE,DEFDOSE,DEFOBS) ;; first (central) compartment
            COMP=(PEROPH) ;; second (peripheral) compartment
$PK
TVCL = THETA(1)
  CL = TVCL * EXP(ETA(1))
TVV1 = THETA(2)
  V1 = TVV1 * EXP(ETA(2))
TVV2 = THETA(3)
  V2 = TVV2
 TVQ = THETA(4)
   Q = TVQ
 K10 = CL/V1
 K12 = Q/V1
 K21 = Q/V2
  S1 = V1 ;; scale prediction based on DOSE (mmol) and DV (mmol/L)
  S2 = V2

$THETA  (0,7) ; ; CL
 (0,40) ; _; V1
 (0,20) ; __; V2
 (0,30) ; ___; Q
; chech phase 1 trial, SAME order as PK
$OMEGA  0.05  ;       ____  ; not yet known, outcome picked for next models, put a relatively small number
 0.05  ;      _____  ; not yet known, outcome picked for next models
 ;; variance covariance matrix for interindividual variability
$SIGMA  0.1  ;     ______  ; EPS(1), proportional error, not yet known, outcome picked for next models
;; variance covariance matrix for residual error
$DES DADT(1) = -K10*A(1) -K12*A(1) +K21*A(2)  ;; ODE for central    compartment
     DADT(2) =            K12*A(1) -K21*A(2)  ;; ODE for peripheral compartment

$ERROR
IPRED = F
Y = IPRED + IPRED*ERR(1)
W = SQRT(IPRED**2*SIGMA(1,1)) ;; new
IRES  = CONC - IPRED
IWRES = IRES / W

$ESTIMATION METHOD=1 INTERACTION ;; FOCE-I
            MAXEVAL=9999 SIG=3 PRINT=5
$COVARIANCE PRINT=E UNCONDITIONAL ;; new
 ;; output table for standard outcomes
$TABLE      ID TIME DV EVID PRED CWRES MDV IPRED WRES RES CWRES
            NOPRINT ONEHEADER FILE=run01_sdtab
 ;; output table for PK parameters
$TABLE      ID CL V1 V2 Q K10 K12 K21 NOPRINT NOAPPEND ONEHEADER
            FILE=run01_patab
 ;; output table for categorical covariates
$TABLE      ID SEX ETHNI NOPRINT NOAPPEND ONEHEADER FILE=run01_catab
 ;; output table for continuous covariates
$TABLE      ID BW ALB SCR eGFR AGE NOPRINT NOAPPEND ONEHEADER
            FILE=run01_cotab

NM-TRAN MESSAGES
 WARNINGS AND ERRORS (IF ANY) FOR PROBLEM    1
 (WARNING  2) NM-TRAN INFERS THAT THE DATA ARE POPULATION.
 (WARNING  79) SIGMA IS USED ON THE RIGHT. WITH A SUBSEQUENT RUN, IF AN
 INITIAL ESTIMATE OF A DIAGONAL BLOCK OF SIGMA IS TO BE COMPUTED BY
 NONMEM, THAT BLOCK WILL BE SET TO AN IDENTITY MATRIX DURING THAT
 COMPUTATION. THIS COULD LEAD TO AN ARITHMETIC EXCEPTION.*
 * THE MAXIMUM NUMBER OF WARNINGS OF ONE OR MORE TYPES WAS REACHED.
 IT IS POSSIBLE THAT SOME WARNING MESSAGES WERE SUPPRESSED.
Note: Analytical 2nd Derivatives are constructed in FSUBS but are never used.
      You may insert $ABBR DERIV2=NO after the first $PROB to save FSUBS construction and compilation time

1NONLINEAR MIXED EFFECTS MODEL PROGRAM (NONMEM) VERSION 7.6.0 (nm760)
 ORIGINALLY DEVELOPED BY STUART BEAL, LEWIS SHEINER, AND ALISON BOECKMANN
 CURRENT DEVELOPERS ARE ROBERT BAUER, ICON DEVELOPMENT SOLUTIONS,
 AND ALISON BOECKMANN. IMPLEMENTATION, EFFICIENCY, AND STANDARDIZATION
 PERFORMED BY NOUS INFOSYSTEMS.
 PROBLEM NO.:         1
 CeftriaxPro Base Model Development
 TOT. NO. OF OBS RECS:      496
 TOT. NO. OF INDIVIDUALS:       33
 GENERAL NONLINEAR KINETICS MODEL WITH STIFF/NONSTIFF EQUATIONS (LSODA, ADVAN13)
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 #TBLN:      1
 #METH: First Order Conditional Estimation with Interaction
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
 #TERM:
0MINIMIZATION SUCCESSFUL
 NO. OF FUNCTION EVALUATIONS USED:      291
 NO. OF SIG. DIGITS IN FINAL EST.:  3.2

 ETABAR IS THE ARITHMETIC MEAN OF THE ETA-ESTIMATES,
 AND THE P-VALUE IS GIVEN FOR THE NULL HYPOTHESIS THAT THE TRUE MEAN IS 0.

 ETABAR:         1.9987E-03 -4.4723E-04
 SE:             8.2246E-02  9.1481E-02
 N:                      33          33

 P VAL.:         9.8061E-01  9.9610E-01

 ETASHRINKSD(%)  8.5752E-01  3.7267E+00
 ETASHRINKVR(%)  1.7077E+00  7.3146E+00
 EBVSHRINKSD(%)  7.6364E-01  3.2142E+00
 EBVSHRINKVR(%)  1.5214E+00  6.3250E+00
 RELATIVEINF(%)  9.8476E+01  9.3672E+01
 EPSSHRINKSD(%)  5.7734E+00
 EPSSHRINKVR(%)  1.1214E+01


 TOTAL DATA POINTS NORMALLY DISTRIBUTED (N):          496
 N*LOG(2PI) CONSTANT TO OBJECTIVE FUNCTION:    911.58702493903525
 OBJECTIVE FUNCTION VALUE WITHOUT CONSTANT:   -4461.5962801894038
 OBJECTIVE FUNCTION VALUE WITH CONSTANT:      -3550.0092552503684
 REPORTED OBJECTIVE FUNCTION DOES NOT CONTAIN CONSTANT

 TOTAL EFFECTIVE ETAS (NIND*NETA):                            66


 #TERE:
 Elapsed estimation  time in seconds:    96.04
 Elapsed covariance  time in seconds:    50.68
 Elapsed postprocess time in seconds:     0.79

 ********************               FIRST ORDER CONDITIONAL ESTIMATION WITH INTERACTION              ********************
 #OBJT:**************                       MINIMUM VALUE OF OBJECTIVE FUNCTION                      ********************
 #OBJV:********************************************         -4461.596       *********************************************

 ********************               FIRST ORDER CONDITIONAL ESTIMATION WITH INTERACTION              ********************
 ********************                             FINAL PARAMETER ESTIMATE                           ********************

 THETA - VECTOR OF FIXED EFFECTS PARAMETERS   *********
         TH 1      TH 2      TH 3      TH 4
         7.31E+00  5.72E+01  4.91E+01  2.03E+01

 OMEGA - COV MATRIX FOR RANDOM EFFECTS - ETAS  ********
         ETA1      ETA2
 ETA1
+        2.27E-01
 ETA2
+        0.00E+00  2.98E-01

 SIGMA - COV MATRIX FOR RANDOM EFFECTS - EPSILONS  ****
         EPS1
 EPS1
+        5.20E-02

 OMEGA - CORR MATRIX FOR RANDOM EFFECTS - ETAS  *******
         ETA1      ETA2
 ETA1
+        4.77E-01
 ETA2
+        0.00E+00  5.46E-01

 SIGMA - CORR MATRIX FOR RANDOM EFFECTS - EPSILONS  ***
         EPS1
 EPS1
+        2.28E-01

 ********************               FIRST ORDER CONDITIONAL ESTIMATION WITH INTERACTION              ********************
 ********************                            STANDARD ERROR OF ESTIMATE                          ********************

 THETA - VECTOR OF FIXED EFFECTS PARAMETERS   *********
         TH 1      TH 2      TH 3      TH 4
         5.26E-01  5.72E+00  3.55E+00  1.69E+00

 OMEGA - COV MATRIX FOR RANDOM EFFECTS - ETAS  ********
         ETA1      ETA2
 ETA1
+        5.56E-02
 ETA2
+       .........  5.81E-02

 SIGMA - COV MATRIX FOR RANDOM EFFECTS - EPSILONS  ****
         EPS1
 EPS1
+        4.57E-03

 OMEGA - CORR MATRIX FOR RANDOM EFFECTS - ETAS  *******
         ETA1      ETA2
 ETA1
+        5.83E-02
 ETA2
+       .........  5.32E-02

 SIGMA - CORR MATRIX FOR RANDOM EFFECTS - EPSILONS  ***
         EPS1
 EPS1
+        1.00E-02

 ********************               FIRST ORDER CONDITIONAL ESTIMATION WITH INTERACTION              ********************
 ********************                          COVARIANCE MATRIX OF ESTIMATE                         ********************

            TH 1      TH 2      TH 3      TH 4      OM11      OM12      OM22      SG11
 TH 1
+        2.77E-01
 TH 2
+        1.65E+00  3.27E+01
 TH 3
+       -3.78E-01 -5.36E+00  1.26E+01
 TH 4
+       -9.42E-02 -2.46E+00  1.75E+00  2.85E+00
 OM11
+       -7.05E-03 -4.21E-02  1.57E-02 -6.47E-03  3.09E-03
 OM12
+       ......... ......... ......... ......... ......... .........
 OM22
+       -6.45E-03 -2.62E-02 -1.86E-02  9.59E-03  8.79E-04 .........  3.37E-03
 SG11
+        1.40E-04 -5.01E-03 -1.66E-03  1.22E-03 -5.15E-05 .........  4.27E-05  2.08E-05

 ********************               FIRST ORDER CONDITIONAL ESTIMATION WITH INTERACTION              ********************
 ********************                          CORRELATION MATRIX OF ESTIMATE                        ********************

            TH 1      TH 2      TH 3      TH 4      OM11      OM12      OM22      SG11
 TH 1
+        5.26E-01
 TH 2
+        5.48E-01  5.72E+00
 TH 3
+       -2.03E-01 -2.65E-01  3.55E+00
 TH 4
+       -1.06E-01 -2.55E-01  2.92E-01  1.69E+00
 OM11
+       -2.41E-01 -1.32E-01  7.96E-02 -6.89E-02  5.56E-02
 OM12
+       ......... ......... ......... ......... ......... .........
 OM22
+       -2.11E-01 -7.89E-02 -9.05E-02  9.78E-02  2.73E-01 .........  5.81E-02
 SG11
+        5.82E-02 -1.92E-01 -1.03E-01  1.58E-01 -2.03E-01 .........  1.61E-01  4.57E-03
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
 ********************               FIRST ORDER CONDITIONAL ESTIMATION WITH INTERACTION              ********************
 ********************                      EIGENVALUES OF COR MATRIX OF ESTIMATE                     ********************

             1         2         3         4         5         6         7
         3.53E-01  5.60E-01  6.30E-01  8.93E-01  1.24E+00  1.35E+00  1.97E+00
 Elapsed finaloutput time in seconds:     0.04
 #CPUT: Total CPU Time in Seconds,      147.685
