ma 01 dec 2025 12:10:45 CET
;; 1. Based on: run01
;; 2. Description: CeftriaxPro Base Model - Total Plasma Conc.
;; x1. TEAM2
;; 2025-11-30
$PROBLEM    CeftriaxPro Base Model Development
$INPUT      ID TIME DOSE=AMT RATE CONC=DV CONC_ID BW SEX ALB SCR eGFR
            AGE ETHNI PR DVID CMT MDV EVID
$DATA      dataset.csv IGNORE=@
$SUBROUTINE ADVAN13 ;; general nonlinear model
            TOL=9
$MODEL      NCOMP=2 ;; number of compartments
            COMP=(DOSE,DEFDOSE,DEFOBS) ;; first (central) compartment
            COMP=(PERIPH) ;; second (peripheral) compartment
$PK
TVCL = THETA(1)
  CL = TVCL * EXP(ETA(1))
TVV1 = THETA(2)
  V1 = TVV1 * EXP(ETA(2))
TVV2 = THETA(3)
  V2 = TVV2
 TVQ = THETA(4)
   Q = TVQ
 K10 = CL/V1
 K12 = Q/V1
 K21 = Q/V2
  S1 = V1 ;; scale prediction based on DOSE (mmol) and DV (mmol/L)
  S2 = V2

; Binding parameters
TVKD = THETA(5)
  KD = TVKD
 TVN = THETA(6)
   N = TVN

$THETA  (0,7) ; ; CL
 (0,40) ; _; V1
 (0,20) ; __; V2
 (0,30) ; ___; Q
 (0,0.1) ; ____; KD
 (0,1) ; _____; N
; chech phase 1 trial, SAME order as PK
$OMEGA  0.05  ;     ______  ; not yet known, outcome picked for next models, put a relatively small number
 0.05  ;    _______  ; not yet known, outcome picked for next models
 ;; variance covariance matrix for interindividual variability
$SIGMA  0.1  ;   ________  ; EPS(1), proportional error, not yet known, outcome picked for next models
;; variance covariance matrix for residual error
$DES DADT(1) = -K10*A(1) -K12*A(1) +K21*A(2)  ;; ODE for central    compartment
     DADT(2) =            K12*A(1) -K21*A(2)  ;; ODE for peripheral compartment

$ERROR
IPRED_UNBOUND = F
IF (CONC_ID.EQ.2) IPRED = IPRED_UNBOUND ;; unbound
IF (CONC_ID.EQ.1) IPRED = IPRED_UNBOUND * (1 + (N * ALB)/(KD + IPRED_UNBOUND))

Y = IPRED + IPRED*ERR(1)
W = SQRT(IPRED**2*SIGMA(1,1))
IRES  = CONC - IPRED
IWRES = IRES / W

$ESTIMATION METHOD=1 INTERACTION ;; FOCE-I
            MAXEVAL=9999 SIG=3 PRINT=5
$COVARIANCE UNCONDITIONAL MATRIX=S
 ;; output table for standard outcomes
$TABLE      ID TIME DV CONC_ID EVID PRED CWRES MDV IPRED WRES RES
            CWRES NOPRINT ONEHEADER FILE=run02_sdtab
 ;; output table for PK parameters
$TABLE      ID CL V1 V2 Q K10 K12 K21 KD N NOPRINT NOAPPEND ONEHEADER
            FILE=run02_patab
 ;; output table for categorical covariates
$TABLE      ID SEX ETHNI NOPRINT NOAPPEND ONEHEADER FILE=run02_catab
 ;; output table for continuous covariates
$TABLE      ID BW ALB SCR eGFR AGE NOPRINT NOAPPEND ONEHEADER
            FILE=run02_cotab

NM-TRAN MESSAGES
 WARNINGS AND ERRORS (IF ANY) FOR PROBLEM    1
 (WARNING  2) NM-TRAN INFERS THAT THE DATA ARE POPULATION.
 (WARNING  3) THERE MAY BE AN ERROR IN THE ABBREVIATED CODE. THE FOLLOWING
 ONE OR MORE RANDOM VARIABLES ARE DEFINED WITH "IF" STATEMENTS THAT DO NOT
 PROVIDE DEFINITIONS FOR BOTH THE "THEN" AND "ELSE" CASES. IF ALL
 CONDITIONS FAIL, THE VALUES OF THESE VARIABLES WILL BE ZERO.
   IPRED
 (WARNING  79) SIGMA IS USED ON THE RIGHT. WITH A SUBSEQUENT RUN, IF AN
 INITIAL ESTIMATE OF A DIAGONAL BLOCK OF SIGMA IS TO BE COMPUTED BY
 NONMEM, THAT BLOCK WILL BE SET TO AN IDENTITY MATRIX DURING THAT
 COMPUTATION. THIS COULD LEAD TO AN ARITHMETIC EXCEPTION.*
 * THE MAXIMUM NUMBER OF WARNINGS OF ONE OR MORE TYPES WAS REACHED.
 IT IS POSSIBLE THAT SOME WARNING MESSAGES WERE SUPPRESSED.
Note: Analytical 2nd Derivatives are constructed in FSUBS but are never used.
      You may insert $ABBR DERIV2=NO after the first $PROB to save FSUBS construction and compilation time

1NONLINEAR MIXED EFFECTS MODEL PROGRAM (NONMEM) VERSION 7.6.0 (nm760)
 ORIGINALLY DEVELOPED BY STUART BEAL, LEWIS SHEINER, AND ALISON BOECKMANN
 CURRENT DEVELOPERS ARE ROBERT BAUER, ICON DEVELOPMENT SOLUTIONS,
 AND ALISON BOECKMANN. IMPLEMENTATION, EFFICIENCY, AND STANDARDIZATION
 PERFORMED BY NOUS INFOSYSTEMS.
 PROBLEM NO.:         1
 CeftriaxPro Base Model Development
 TOT. NO. OF OBS RECS:      992
 TOT. NO. OF INDIVIDUALS:       33
 GENERAL NONLINEAR KINETICS MODEL WITH STIFF/NONSTIFF EQUATIONS (LSODA, ADVAN13)
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 #TBLN:      1
 #METH: First Order Conditional Estimation with Interaction
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
 #TERM:
0MINIMIZATION SUCCESSFUL
 HOWEVER, PROBLEMS OCCURRED WITH THE MINIMIZATION.
 REGARD THE RESULTS OF THE ESTIMATION STEP CAREFULLY, AND ACCEPT THEM ONLY
 AFTER CHECKING THAT THE COVARIANCE STEP PRODUCES REASONABLE OUTPUT.
 NO. OF FUNCTION EVALUATIONS USED:      318
 NO. OF SIG. DIGITS IN FINAL EST.:  3.5

 ETABAR IS THE ARITHMETIC MEAN OF THE ETA-ESTIMATES,
 AND THE P-VALUE IS GIVEN FOR THE NULL HYPOTHESIS THAT THE TRUE MEAN IS 0.

 ETABAR:         1.8172E-03  3.3510E-04
 SE:             7.9555E-02  8.7635E-02
 N:                      33          33

 P VAL.:         9.8178E-01  9.9695E-01

 ETASHRINKSD(%)  6.7872E-01  3.2818E+00
 ETASHRINKVR(%)  1.3528E+00  6.4558E+00
 EBVSHRINKSD(%)  5.8309E-01  2.8636E+00
 EBVSHRINKVR(%)  1.1628E+00  5.6451E+00
 RELATIVEINF(%)  9.8834E+01  9.4352E+01
 EPSSHRINKSD(%)  2.7987E+00
 EPSSHRINKVR(%)  5.5191E+00


 TOTAL DATA POINTS NORMALLY DISTRIBUTED (N):          992
 N*LOG(2PI) CONSTANT TO OBJECTIVE FUNCTION:    1823.1740498780705
 OBJECTIVE FUNCTION VALUE WITHOUT CONSTANT:   -7215.2049905108288
 OBJECTIVE FUNCTION VALUE WITH CONSTANT:      -5392.0309406327578
 REPORTED OBJECTIVE FUNCTION DOES NOT CONTAIN CONSTANT

 TOTAL EFFECTIVE ETAS (NIND*NETA):                            66


 #TERE:
 Elapsed estimation  time in seconds:   100.82
 Elapsed covariance  time in seconds:    11.14
 Elapsed postprocess time in seconds:     0.90

 ********************               FIRST ORDER CONDITIONAL ESTIMATION WITH INTERACTION              ********************
 #OBJT:**************                       MINIMUM VALUE OF OBJECTIVE FUNCTION                      ********************
 #OBJV:********************************************         -7215.205       *********************************************

 ********************               FIRST ORDER CONDITIONAL ESTIMATION WITH INTERACTION              ********************
 ********************                             FINAL PARAMETER ESTIMATE                           ********************

 THETA - VECTOR OF FIXED EFFECTS PARAMETERS   *********
         TH 1      TH 2      TH 3      TH 4      TH 5      TH 6
         7.24E+00  5.72E+01  4.87E+01  2.03E+01  4.29E-02  8.51E-01

 OMEGA - COV MATRIX FOR RANDOM EFFECTS - ETAS  ********
         ETA1      ETA2
 ETA1
+        2.12E-01
 ETA2
+        0.00E+00  2.71E-01

 SIGMA - COV MATRIX FOR RANDOM EFFECTS - EPSILONS  ****
         EPS1
 EPS1
+        5.67E-02

 OMEGA - CORR MATRIX FOR RANDOM EFFECTS - ETAS  *******
         ETA1      ETA2
 ETA1
+        4.60E-01
 ETA2
+        0.00E+00  5.21E-01

 SIGMA - CORR MATRIX FOR RANDOM EFFECTS - EPSILONS  ***
         EPS1
 EPS1
+        2.38E-01

 ********************               FIRST ORDER CONDITIONAL ESTIMATION WITH INTERACTION              ********************
 ********************                            STANDARD ERROR OF ESTIMATE                          ********************

 THETA - VECTOR OF FIXED EFFECTS PARAMETERS   *********
         TH 1      TH 2      TH 3      TH 4      TH 5      TH 6
         7.12E-01  7.49E+00  2.38E+00  2.17E+00  3.48E-03  5.08E-02

 OMEGA - COV MATRIX FOR RANDOM EFFECTS - ETAS  ********
         ETA1      ETA2
 ETA1
+        6.75E-02
 ETA2
+       .........  1.04E-01

 SIGMA - COV MATRIX FOR RANDOM EFFECTS - EPSILONS  ****
         EPS1
 EPS1
+        1.66E-03

 OMEGA - CORR MATRIX FOR RANDOM EFFECTS - ETAS  *******
         ETA1      ETA2
 ETA1
+        7.33E-02
 ETA2
+       .........  9.98E-02

 SIGMA - CORR MATRIX FOR RANDOM EFFECTS - EPSILONS  ***
         EPS1
 EPS1
+        3.48E-03

 ********************               FIRST ORDER CONDITIONAL ESTIMATION WITH INTERACTION              ********************
 ********************                          COVARIANCE MATRIX OF ESTIMATE                         ********************

            TH 1      TH 2      TH 3      TH 4      TH 5      TH 6      OM11      OM12      OM22      SG11
 TH 1
+        5.06E-01
 TH 2
+       -1.78E+00  5.61E+01
 TH 3
+        3.55E-01  1.62E+00  5.67E+00
 TH 4
+       -1.73E-01  1.65E-01 -1.20E-01  4.73E+00
 TH 5
+       -3.63E-04 -1.54E-03 -1.52E-03 -5.01E-04  1.21E-05
 TH 6
+       -4.57E-03 -5.91E-02 -2.26E-02 -9.65E-03  1.75E-04  2.59E-03
 OM11
+        4.97E-03 -3.02E-02 -3.03E-02 -2.90E-03  1.07E-04  1.54E-03  4.56E-03
 OM12
+       ......... ......... ......... ......... ......... ......... ......... .........
 OM22
+        1.48E-02 -4.77E-02 -4.08E-02  8.17E-03  3.08E-05  4.60E-04 -3.87E-04 .........  1.08E-02
 SG11
+       -7.94E-05  2.88E-03  3.16E-04  3.96E-04  5.87E-07  5.41E-06  4.87E-07 ......... -1.83E-05  2.75E-06

 ********************               FIRST ORDER CONDITIONAL ESTIMATION WITH INTERACTION              ********************
 ********************                          CORRELATION MATRIX OF ESTIMATE                        ********************

            TH 1      TH 2      TH 3      TH 4      TH 5      TH 6      OM11      OM12      OM22      SG11
 TH 1
+        7.12E-01
 TH 2
+       -3.34E-01  7.49E+00
 TH 3
+        2.10E-01  9.10E-02  2.38E+00
 TH 4
+       -1.12E-01  1.01E-02 -2.32E-02  2.17E+00
 TH 5
+       -1.47E-01 -5.90E-02 -1.84E-01 -6.62E-02  3.48E-03
 TH 6
+       -1.26E-01 -1.55E-01 -1.87E-01 -8.73E-02  9.87E-01  5.08E-02
 OM11
+        1.03E-01 -5.98E-02 -1.89E-01 -1.98E-02  4.55E-01  4.48E-01  6.75E-02
 OM12
+       ......... ......... ......... ......... ......... ......... ......... .........
 OM22
+        2.01E-01 -6.13E-02 -1.65E-01  3.62E-02  8.52E-02  8.70E-02 -5.51E-02 .........  1.04E-01
 SG11
+       -6.73E-02  2.31E-01  8.00E-02  1.10E-01  1.02E-01  6.42E-02  4.35E-03 ......... -1.06E-01  1.66E-03
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 Elapsed finaloutput time in seconds:     0.07
 #CPUT: Total CPU Time in Seconds,      112.667
