di 02 dec 2025 13:54:14 CET
;; 1. Based on: run02
;; 2. Description: CeftriaxPro Base Model - eGFR~CL
;; x1. TEAM2
;; 2025-12-01
$PROBLEM    CeftriaxPro Base Model Development
$INPUT      ID TIME DOSE=AMT RATE CONC=DV CONC_ID BW SEX ALB SCR eGFR
            AGE ETHNI PR DVID CMT MDV EVID
$DATA      dataset.csv IGNORE=@
$SUBROUTINE ADVAN13 ;; general nonlinear model
            TOL=9
$MODEL      NCOMP=2 ;; number of compartments
            COMP=(DOSE,DEFDOSE,DEFOBS) ;; first (central) compartment
            COMP=(PERIPH) ;; second (peripheral) compartment
$PK
IF (EVID.EQ.1) LASTDOSE = TIME
TAD = TIME - LASTDOSE

EGFRCL = THETA(1)

; exponents for covariates
TVCL = THETA(2)
  CL = TVCL * (eGFR/90)**EGFRCL * EXP(ETA(1))
TVV1 = THETA(3)
  V1 = TVV1 * EXP(ETA(2))
TVV2 = THETA(4)
  V2 = TVV2
 TVQ = THETA(5)
   Q = TVQ

 K10 = CL/V1
 K12 = Q/V1
 K21 = Q/V2
  S1 = V1 ;; scale prediction based on DOSE (mmol) and DV (mmol/L)
  S2 = V2

; Binding parameters
TVKD = THETA(6)
  KD = TVKD
 TVN = THETA(7)
   N = TVN

$THETA  0.1 ; ; EGFRCL
 (0,7) ; _; CL
 (0,40) ; __; V1
 (0,20) ; ___; V2
 (0,30) ; ____; Q
 (0,0.1) ; _____; KD
 (0,1) ; ______; N
; chech phase 1 trial, SAME order as PK
$OMEGA  0.05  ;    _______  ; not yet known, outcome picked for next models, put a relatively small number
 0.05  ;   ________  ; not yet known, outcome picked for next models
 ;; variance covariance matrix for interindividual variability
$SIGMA  0.1  ;  _________  ; EPS(1), proportional error, not yet known, outcome picked for next models
;; variance covariance matrix for residual error
$DES DADT(1) = -K10*A(1) -K12*A(1) +K21*A(2)  ;; ODE for central    compartment
     DADT(2) =            K12*A(1) -K21*A(2)  ;; ODE for peripheral compartment

$ERROR
IPRED_UNBOUND = F
IF (CONC_ID.EQ.2) IPRED = IPRED_UNBOUND ;; unbound
IF (CONC_ID.EQ.1) IPRED = IPRED_UNBOUND * (1 + (N * ALB)/(KD + IPRED_UNBOUND))

Y = IPRED + IPRED*ERR(1)
W = SQRT(IPRED**2*SIGMA(1,1))
IRES  = CONC - IPRED
IWRES = IRES / W

$ESTIMATION METHOD=1 INTERACTION ;; FOCE-I
            MAXEVAL=9999 SIG=3 PRINT=5
$COVARIANCE UNCONDITIONAL MATRIX=S
$TABLE      ID TIME TAD DV CONC_ID EVID PRED CWRES MDV IPRED WRES RES
            CL ETA(1) V1 ETA(2) V2 Q K10 K12 K21 KD N SEX ETHNI BW ALB
            SCR eGFR AGE PR NOPRINT ONEHEADER FILE=run02

NM-TRAN MESSAGES
 WARNINGS AND ERRORS (IF ANY) FOR PROBLEM    1
 (WARNING  2) NM-TRAN INFERS THAT THE DATA ARE POPULATION.
 (WARNING  3) THERE MAY BE AN ERROR IN THE ABBREVIATED CODE. THE FOLLOWING
 ONE OR MORE RANDOM VARIABLES ARE DEFINED WITH "IF" STATEMENTS THAT DO NOT
 PROVIDE DEFINITIONS FOR BOTH THE "THEN" AND "ELSE" CASES. IF ALL
 CONDITIONS FAIL, THE VALUES OF THESE VARIABLES WILL BE ZERO.
   IPRED
 (WARNING  79) SIGMA IS USED ON THE RIGHT. WITH A SUBSEQUENT RUN, IF AN
 INITIAL ESTIMATE OF A DIAGONAL BLOCK OF SIGMA IS TO BE COMPUTED BY
 NONMEM, THAT BLOCK WILL BE SET TO AN IDENTITY MATRIX DURING THAT
 COMPUTATION. THIS COULD LEAD TO AN ARITHMETIC EXCEPTION.*
 * THE MAXIMUM NUMBER OF WARNINGS OF ONE OR MORE TYPES WAS REACHED.
 IT IS POSSIBLE THAT SOME WARNING MESSAGES WERE SUPPRESSED.
Note: Analytical 2nd Derivatives are constructed in FSUBS but are never used.
      You may insert $ABBR DERIV2=NO after the first $PROB to save FSUBS construction and compilation time

1NONLINEAR MIXED EFFECTS MODEL PROGRAM (NONMEM) VERSION 7.6.0 (nm760)
 ORIGINALLY DEVELOPED BY STUART BEAL, LEWIS SHEINER, AND ALISON BOECKMANN
 CURRENT DEVELOPERS ARE ROBERT BAUER, ICON DEVELOPMENT SOLUTIONS,
 AND ALISON BOECKMANN. IMPLEMENTATION, EFFICIENCY, AND STANDARDIZATION
 PERFORMED BY NOUS INFOSYSTEMS.
 PROBLEM NO.:         1
 CeftriaxPro Base Model Development
 TOT. NO. OF OBS RECS:      992
 TOT. NO. OF INDIVIDUALS:       33
 GENERAL NONLINEAR KINETICS MODEL WITH STIFF/NONSTIFF EQUATIONS (LSODA, ADVAN13)
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 #TBLN:      1
 #METH: First Order Conditional Estimation with Interaction
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
 #TERM:
0MINIMIZATION SUCCESSFUL
 NO. OF FUNCTION EVALUATIONS USED:      392
 NO. OF SIG. DIGITS IN FINAL EST.:  3.1

 ETABAR IS THE ARITHMETIC MEAN OF THE ETA-ESTIMATES,
 AND THE P-VALUE IS GIVEN FOR THE NULL HYPOTHESIS THAT THE TRUE MEAN IS 0.

 ETABAR:         1.4328E-03 -3.5928E-05
 SE:             5.4215E-02  8.9628E-02
 N:                      33          33

 P VAL.:         9.7892E-01  9.9968E-01

 ETASHRINKSD(%)  1.0737E+00  2.6856E+00
 ETASHRINKVR(%)  2.1359E+00  5.2991E+00
 EBVSHRINKSD(%)  1.0094E+00  2.3151E+00
 EBVSHRINKVR(%)  2.0086E+00  4.5766E+00
 RELATIVEINF(%)  9.7986E+01  9.5418E+01
 EPSSHRINKSD(%)  2.8774E+00
 EPSSHRINKVR(%)  5.6720E+00


 TOTAL DATA POINTS NORMALLY DISTRIBUTED (N):          992
 N*LOG(2PI) CONSTANT TO OBJECTIVE FUNCTION:    1823.1740498780705
 OBJECTIVE FUNCTION VALUE WITHOUT CONSTANT:   -7434.5421395383773
 OBJECTIVE FUNCTION VALUE WITH CONSTANT:      -5611.3680896603073
 REPORTED OBJECTIVE FUNCTION DOES NOT CONTAIN CONSTANT

 TOTAL EFFECTIVE ETAS (NIND*NETA):                            66


 #TERE:
 Elapsed estimation  time in seconds:   112.84
 Elapsed covariance  time in seconds:    11.89
 Elapsed postprocess time in seconds:     0.82

 ********************               FIRST ORDER CONDITIONAL ESTIMATION WITH INTERACTION              ********************
 #OBJT:**************                       MINIMUM VALUE OF OBJECTIVE FUNCTION                      ********************
 #OBJV:********************************************         -7434.542       *********************************************

 ********************               FIRST ORDER CONDITIONAL ESTIMATION WITH INTERACTION              ********************
 ********************                             FINAL PARAMETER ESTIMATE                           ********************

 THETA - VECTOR OF FIXED EFFECTS PARAMETERS   *********
         TH 1      TH 2      TH 3      TH 4      TH 5      TH 6      TH 7
         1.59E+00  8.31E+00  5.61E+01  4.40E+01  2.06E+01  4.14E-02  8.40E-01

 OMEGA - COV MATRIX FOR RANDOM EFFECTS - ETAS  ********
         ETA1      ETA2
 ETA1
+        9.91E-02
 ETA2
+        0.00E+00  2.80E-01

 SIGMA - COV MATRIX FOR RANDOM EFFECTS - EPSILONS  ****
         EPS1
 EPS1
+        4.64E-02

 OMEGA - CORR MATRIX FOR RANDOM EFFECTS - ETAS  *******
         ETA1      ETA2
 ETA1
+        3.15E-01
 ETA2
+        0.00E+00  5.29E-01

 SIGMA - CORR MATRIX FOR RANDOM EFFECTS - EPSILONS  ***
         EPS1
 EPS1
+        2.15E-01

 ********************               FIRST ORDER CONDITIONAL ESTIMATION WITH INTERACTION              ********************
 ********************                            STANDARD ERROR OF ESTIMATE                          ********************

 THETA - VECTOR OF FIXED EFFECTS PARAMETERS   *********
         TH 1      TH 2      TH 3      TH 4      TH 5      TH 6      TH 7
         1.24E-01  5.81E-01  8.53E+00  1.92E+00  2.69E+00  2.60E-03  3.80E-02

 OMEGA - COV MATRIX FOR RANDOM EFFECTS - ETAS  ********
         ETA1      ETA2
 ETA1
+        3.97E-02
 ETA2
+       .........  1.22E-01

 SIGMA - COV MATRIX FOR RANDOM EFFECTS - EPSILONS  ****
         EPS1
 EPS1
+        1.48E-03

 OMEGA - CORR MATRIX FOR RANDOM EFFECTS - ETAS  *******
         ETA1      ETA2
 ETA1
+        6.31E-02
 ETA2
+       .........  1.15E-01

 SIGMA - CORR MATRIX FOR RANDOM EFFECTS - EPSILONS  ***
         EPS1
 EPS1
+        3.44E-03

 ********************               FIRST ORDER CONDITIONAL ESTIMATION WITH INTERACTION              ********************
 ********************                          COVARIANCE MATRIX OF ESTIMATE                         ********************

            TH 1      TH 2      TH 3      TH 4      TH 5      TH 6      TH 7      OM11      OM12      OM22      SG11
 TH 1
+        1.54E-02
 TH 2
+        6.93E-03  3.38E-01
 TH 3
+        4.40E-01 -1.97E+00  7.28E+01
 TH 4
+        4.36E-02  5.19E-02  1.96E+00  3.70E+00
 TH 5
+       -1.53E-01  3.08E-01 -8.72E+00 -1.04E+00  7.23E+00
 TH 6
+        4.90E-05 -1.49E-04  2.68E-03 -3.01E-04 -1.31E-03  6.76E-06
 TH 7
+        7.39E-04 -1.89E-03  1.16E-02 -3.78E-03 -2.07E-02  9.72E-05  1.45E-03
 OM11
+       -5.49E-04  4.56E-03 -8.00E-02 -2.48E-03  1.85E-02 -1.05E-05 -1.63E-04  1.58E-03
 OM12
+       ......... ......... ......... ......... ......... ......... ......... ......... .........
 OM22
+       -8.96E-06  6.15E-03  1.14E-01  2.38E-02  7.77E-03  4.83E-05  7.12E-04 -2.54E-03 .........  1.48E-02
 SG11
+       -3.11E-05  3.13E-05  2.17E-04 -3.22E-04  6.32E-04  7.95E-07  7.99E-06  1.68E-05 ......... -3.32E-05  2.20E-06

 ********************               FIRST ORDER CONDITIONAL ESTIMATION WITH INTERACTION              ********************
 ********************                          CORRELATION MATRIX OF ESTIMATE                        ********************

            TH 1      TH 2      TH 3      TH 4      TH 5      TH 6      TH 7      OM11      OM12      OM22      SG11
 TH 1
+        1.24E-01
 TH 2
+        9.61E-02  5.81E-01
 TH 3
+        4.16E-01 -3.97E-01  8.53E+00
 TH 4
+        1.83E-01  4.64E-02  1.20E-01  1.92E+00
 TH 5
+       -4.58E-01  1.97E-01 -3.80E-01 -2.01E-01  2.69E+00
 TH 6
+        1.52E-01 -9.85E-02  1.21E-01 -6.03E-02 -1.87E-01  2.60E-03
 TH 7
+        1.57E-01 -8.57E-02  3.58E-02 -5.17E-02 -2.03E-01  9.83E-01  3.80E-02
 OM11
+       -1.11E-01  1.98E-01 -2.36E-01 -3.25E-02  1.73E-01 -1.02E-01 -1.08E-01  3.97E-02
 OM12
+       ......... ......... ......... ......... ......... ......... ......... ......... .........
 OM22
+       -5.94E-04  8.70E-02  1.10E-01  1.02E-01  2.38E-02  1.53E-01  1.54E-01 -5.27E-01 .........  1.22E-01
 SG11
+       -1.69E-01  3.64E-02  1.72E-02 -1.13E-01  1.59E-01  2.06E-01  1.42E-01  2.85E-01 ......... -1.85E-01  1.48E-03
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 Elapsed finaloutput time in seconds:     0.07
 #CPUT: Total CPU Time in Seconds,      125.420
