ma 01 dec 2025 11:17:56 CET
;; 1. Based on: run02
;; 2. Description: CeftriaxPro Base Model - Covariates
;; x1. TEAM2
;; 2025-12-01
$PROBLEM    CeftriaxPro Base Model Development
$INPUT      ID TIME DOSE=AMT RATE CONC=DV CONC_ID BW SEX ALB SCR eGFR
            AGE ETHNI PR DVID CMT MDV EVID
$DATA      dataset.csv IGNORE=@
$SUBROUTINE ADVAN13 ;; general nonlinear model
            TOL=9
$MODEL      NCOMP=2 ;; number of compartments
            COMP=(DOSE,DEFDOSE,DEFOBS) ;; first (central) compartment
            COMP=(PERIPH) ;; second (peripheral) compartment
$PK
; exponents for covariates
BWCL = THETA(1)

TVCL = THETA(2)
  CL = TVCL * (BW/70)**BWCL * EXP(ETA(1))
TVV1 = THETA(3)
  V1 = TVV1 * EXP(ETA(2))
;;V1 = TVV1 * (BW/70) * EXP(ETA(2))
TVV2 = THETA(4)
  V2 = TVV2
 TVQ = THETA(5)
   Q = TVQ

 K10 = CL/V1
 K12 = Q/V1
 K21 = Q/V2
  S1 = V1 ;; scale prediction based on DOSE (mmol) and DV (mmol/L)
  S2 = V2

; Binding parameters
TVKD = THETA(6)
  KD = TVKD
 TVN = THETA(7)
   N = TVN

$THETA  (0,1) ; ; BWCL
 (0,7) ; _; CL
 (0,40) ; __; V1
 (0,20) ; ___; V2
 (0,30) ; ____; Q
 (0,0.1) ; _____; KD
 (0,1) ; ______; N
; chech phase 1 trial, SAME order as PK
$OMEGA  0.05  ;    _______  ; not yet known, outcome picked for next models, put a relatively small number
 0.05  ;   ________  ; not yet known, outcome picked for next models
 ;; variance covariance matrix for interindividual variability
$SIGMA  0.1  ;  _________  ; EPS(1), proportional error, not yet known, outcome picked for next models
;; variance covariance matrix for residual error
$DES DADT(1) = -K10*A(1) -K12*A(1) +K21*A(2)  ;; ODE for central    compartment
     DADT(2) =            K12*A(1) -K21*A(2)  ;; ODE for peripheral compartment

$ERROR
IPRED_UNBOUND = F
IF (CONC_ID.EQ.2) THEN
   IPRED = IPRED_UNBOUND
ELSE
   IPRED = IPRED_UNBOUND * (1 + (N * ALB)/(KD + IPRED_UNBOUND))
ENDIF

Y = IPRED + IPRED*ERR(1)
W = SQRT(IPRED**2*SIGMA(1,1))
IRES  = CONC - IPRED
IWRES = IRES / W

$ESTIMATION METHOD=1 INTERACTION ;; FOCE-I
            MAXEVAL=9999 SIG=3 PRINT=5
$COVARIANCE PRINT=E UNCONDITIONAL ;; new
 ;; output table for standard outcomes
$TABLE      ID TIME DV EVID PRED CWRES MDV IPRED WRES RES CWRES
            NOPRINT ONEHEADER FILE=run04_sdtab
 ;; output table for PK parameters
$TABLE      ID CL V1 V2 Q K10 K12 K21 KD N NOPRINT NOAPPEND ONEHEADER
            FILE=run04_patab
 ;; output table for categorical covariates
$TABLE      ID SEX ETHNI NOPRINT NOAPPEND ONEHEADER FILE=run04_catab
 ;; output table for continuous covariates
$TABLE      ID BW ALB SCR eGFR AGE NOPRINT NOAPPEND ONEHEADER
            FILE=run04_cotab

NM-TRAN MESSAGES
 WARNINGS AND ERRORS (IF ANY) FOR PROBLEM    1
 (WARNING  2) NM-TRAN INFERS THAT THE DATA ARE POPULATION.
 (WARNING  79) SIGMA IS USED ON THE RIGHT. WITH A SUBSEQUENT RUN, IF AN
 INITIAL ESTIMATE OF A DIAGONAL BLOCK OF SIGMA IS TO BE COMPUTED BY
 NONMEM, THAT BLOCK WILL BE SET TO AN IDENTITY MATRIX DURING THAT
 COMPUTATION. THIS COULD LEAD TO AN ARITHMETIC EXCEPTION.*
 * THE MAXIMUM NUMBER OF WARNINGS OF ONE OR MORE TYPES WAS REACHED.
 IT IS POSSIBLE THAT SOME WARNING MESSAGES WERE SUPPRESSED.
Note: Analytical 2nd Derivatives are constructed in FSUBS but are never used.
      You may insert $ABBR DERIV2=NO after the first $PROB to save FSUBS construction and compilation time

1NONLINEAR MIXED EFFECTS MODEL PROGRAM (NONMEM) VERSION 7.6.0 (nm760)
 ORIGINALLY DEVELOPED BY STUART BEAL, LEWIS SHEINER, AND ALISON BOECKMANN
 CURRENT DEVELOPERS ARE ROBERT BAUER, ICON DEVELOPMENT SOLUTIONS,
 AND ALISON BOECKMANN. IMPLEMENTATION, EFFICIENCY, AND STANDARDIZATION
 PERFORMED BY NOUS INFOSYSTEMS.
 PROBLEM NO.:         1
 CeftriaxPro Base Model Development
 TOT. NO. OF OBS RECS:      992
 TOT. NO. OF INDIVIDUALS:       33
 GENERAL NONLINEAR KINETICS MODEL WITH STIFF/NONSTIFF EQUATIONS (LSODA, ADVAN13)
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 #TBLN:      1
 #METH: First Order Conditional Estimation with Interaction
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
 #TERM:
0MINIMIZATION SUCCESSFUL
 HOWEVER, PROBLEMS OCCURRED WITH THE MINIMIZATION.
 REGARD THE RESULTS OF THE ESTIMATION STEP CAREFULLY, AND ACCEPT THEM ONLY
 AFTER CHECKING THAT THE COVARIANCE STEP PRODUCES REASONABLE OUTPUT.
 NO. OF FUNCTION EVALUATIONS USED:      472
 NO. OF SIG. DIGITS IN FINAL EST.:  3.4

 ETABAR IS THE ARITHMETIC MEAN OF THE ETA-ESTIMATES,
 AND THE P-VALUE IS GIVEN FOR THE NULL HYPOTHESIS THAT THE TRUE MEAN IS 0.

 ETABAR:         1.6898E-03  1.5745E-04
 SE:             7.7678E-02  8.7647E-02
 N:                      33          33

 P VAL.:         9.8264E-01  9.9857E-01

 ETASHRINKSD(%)  7.1280E-01  3.2813E+00
 ETASHRINKVR(%)  1.4205E+00  6.4549E+00
 EBVSHRINKSD(%)  6.1177E-01  2.8618E+00
 EBVSHRINKVR(%)  1.2198E+00  5.6417E+00
 RELATIVEINF(%)  9.8777E+01  9.4355E+01
 EPSSHRINKSD(%)  2.7955E+00
 EPSSHRINKVR(%)  5.5129E+00


 TOTAL DATA POINTS NORMALLY DISTRIBUTED (N):          992
 N*LOG(2PI) CONSTANT TO OBJECTIVE FUNCTION:    1823.1740498780705
 OBJECTIVE FUNCTION VALUE WITHOUT CONSTANT:   -7216.1357648083049
 OBJECTIVE FUNCTION VALUE WITH CONSTANT:      -5392.9617149302339
 REPORTED OBJECTIVE FUNCTION DOES NOT CONTAIN CONSTANT

 TOTAL EFFECTIVE ETAS (NIND*NETA):                            66


 #TERE:
 Elapsed estimation  time in seconds:   159.54
 Elapsed covariance  time in seconds:   110.14
 Elapsed postprocess time in seconds:     0.92

 ********************               FIRST ORDER CONDITIONAL ESTIMATION WITH INTERACTION              ********************
 #OBJT:**************                       MINIMUM VALUE OF OBJECTIVE FUNCTION                      ********************
 #OBJV:********************************************         -7216.136       *********************************************

 ********************               FIRST ORDER CONDITIONAL ESTIMATION WITH INTERACTION              ********************
 ********************                             FINAL PARAMETER ESTIMATE                           ********************

 THETA - VECTOR OF FIXED EFFECTS PARAMETERS   *********
         TH 1      TH 2      TH 3      TH 4      TH 5      TH 6      TH 7
         7.36E-01  7.45E+00  5.73E+01  4.89E+01  2.02E+01  4.28E-02  8.51E-01

 OMEGA - COV MATRIX FOR RANDOM EFFECTS - ETAS  ********
         ETA1      ETA2
 ETA1
+        2.02E-01
 ETA2
+        0.00E+00  2.71E-01

 SIGMA - COV MATRIX FOR RANDOM EFFECTS - EPSILONS  ****
         EPS1
 EPS1
+        5.67E-02

 OMEGA - CORR MATRIX FOR RANDOM EFFECTS - ETAS  *******
         ETA1      ETA2
 ETA1
+        4.49E-01
 ETA2
+        0.00E+00  5.21E-01

 SIGMA - CORR MATRIX FOR RANDOM EFFECTS - EPSILONS  ***
         EPS1
 EPS1
+        2.38E-01

 ********************               FIRST ORDER CONDITIONAL ESTIMATION WITH INTERACTION              ********************
 ********************                            STANDARD ERROR OF ESTIMATE                          ********************

 THETA - VECTOR OF FIXED EFFECTS PARAMETERS   *********
         TH 1      TH 2      TH 3      TH 4      TH 5      TH 6      TH 7
         1.13E-01  5.74E-01  5.80E+00  3.09E+00  1.59E+00  5.61E-03  5.03E-02

 OMEGA - COV MATRIX FOR RANDOM EFFECTS - ETAS  ********
         ETA1      ETA2
 ETA1
+        5.13E-02
 ETA2
+       .........  6.13E-02

 SIGMA - COV MATRIX FOR RANDOM EFFECTS - EPSILONS  ****
         EPS1
 EPS1
+        4.83E-03

 OMEGA - CORR MATRIX FOR RANDOM EFFECTS - ETAS  *******
         ETA1      ETA2
 ETA1
+        5.71E-02
 ETA2
+       .........  5.89E-02

 SIGMA - CORR MATRIX FOR RANDOM EFFECTS - EPSILONS  ***
         EPS1
 EPS1
+        1.01E-02

 ********************               FIRST ORDER CONDITIONAL ESTIMATION WITH INTERACTION              ********************
 ********************                          COVARIANCE MATRIX OF ESTIMATE                         ********************

            TH 1      TH 2      TH 3      TH 4      TH 5      TH 6      TH 7      OM11      OM12      OM22      SG11
 TH 1
+        1.29E-02
 TH 2
+        2.52E-02  3.30E-01
 TH 3
+        9.41E-02  1.60E+00  3.37E+01
 TH 4
+        2.28E-02 -3.61E-01 -4.12E+00  9.52E+00
 TH 5
+       -1.52E-03  1.68E-02 -2.97E+00  1.63E+00  2.52E+00
 TH 6
+        8.82E-05  7.54E-05 -1.19E-02 -1.08E-03  2.56E-03  3.15E-05
 TH 7
+        1.42E-03  6.06E-03 -3.65E-02 -8.74E-04  2.86E-02  2.59E-04  2.53E-03
 OM11
+        1.64E-03 -5.42E-03 -2.50E-02  3.98E-02 -8.51E-03 -1.18E-04 -1.27E-03  2.63E-03
 OM12
+       ......... ......... ......... ......... ......... ......... ......... ......... .........
 OM22
+       -3.68E-03 -1.59E-02 -3.70E-02  5.34E-02  1.08E-02 -8.43E-05 -9.02E-04  7.22E-04 .........  3.76E-03
 SG11
+        3.68E-05 -5.30E-05 -2.49E-03  1.22E-03 -5.74E-04 -6.19E-06 -7.68E-05  3.91E-05 .........  2.83E-05  2.34E-05

 ********************               FIRST ORDER CONDITIONAL ESTIMATION WITH INTERACTION              ********************
 ********************                          CORRELATION MATRIX OF ESTIMATE                        ********************

            TH 1      TH 2      TH 3      TH 4      TH 5      TH 6      TH 7      OM11      OM12      OM22      SG11
 TH 1
+        1.13E-01
 TH 2
+        3.87E-01  5.74E-01
 TH 3
+        1.43E-01  4.79E-01  5.80E+00
 TH 4
+        6.51E-02 -2.04E-01 -2.30E-01  3.09E+00
 TH 5
+       -8.46E-03  1.84E-02 -3.23E-01  3.32E-01  1.59E+00
 TH 6
+        1.38E-01  2.34E-02 -3.64E-01 -6.25E-02  2.87E-01  5.61E-03
 TH 7
+        2.49E-01  2.10E-01 -1.25E-01 -5.63E-03  3.57E-01  9.18E-01  5.03E-02
 OM11
+        2.83E-01 -1.84E-01 -8.41E-02  2.51E-01 -1.04E-01 -4.10E-01 -4.94E-01  5.13E-02
 OM12
+       ......... ......... ......... ......... ......... ......... ......... ......... .........
 OM22
+       -5.28E-01 -4.52E-01 -1.04E-01  2.82E-01  1.11E-01 -2.45E-01 -2.92E-01  2.30E-01 .........  6.13E-02
 SG11
+        6.70E-02 -1.91E-02 -8.87E-02  8.16E-02 -7.47E-02 -2.28E-01 -3.16E-01  1.58E-01 .........  9.55E-02  4.83E-03
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
 ********************               FIRST ORDER CONDITIONAL ESTIMATION WITH INTERACTION              ********************
 ********************                      EIGENVALUES OF COR MATRIX OF ESTIMATE                     ********************

             1         2         3         4         5         6         7         8         9        10
         2.65E-02  1.76E-01  3.26E-01  5.17E-01  5.90E-01  9.03E-01  1.01E+00  1.50E+00  2.18E+00  2.78E+00
 Elapsed finaloutput time in seconds:     0.07
 #CPUT: Total CPU Time in Seconds,      269.597
