ma 01 dec 2025 11:30:21 CET
;; 1. Based on: run03
;; 2. Description: CeftriaxPro Base Model - eGFR,BW~CL
;; x1. TEAM2
;; 2025-12-01
$PROBLEM    CeftriaxPro Base Model Development
$INPUT      ID TIME DOSE=AMT RATE CONC=DV CONC_ID BW SEX ALB SCR eGFR
            AGE ETHNI PR DVID CMT MDV EVID
$DATA      dataset.csv IGNORE=@
$SUBROUTINE ADVAN13 ;; general nonlinear model
            TOL=9
$MODEL      NCOMP=2 ;; number of compartments
            COMP=(DOSE,DEFDOSE,DEFOBS) ;; first (central) compartment
            COMP=(PERIPH) ;; second (peripheral) compartment
$PK
; exponents for covariates
EGFRCL = THETA(1)
  BWCL = THETA(2)

TVCL = THETA(3)
  CL = TVCL * (BW/70)**BWCL * (eGFR/90)**EGFRCL * EXP(ETA(1))
TVV1 = THETA(4)
  V1 = TVV1 * EXP(ETA(2))
;;V1 = TVV1 * (BW/70) * EXP(ETA(2))
TVV2 = THETA(5)
  V2 = TVV2
 TVQ = THETA(6)
   Q = TVQ

 K10 = CL/V1
 K12 = Q/V1
 K21 = Q/V2
  S1 = V1 ;; scale prediction based on DOSE (mmol) and DV (mmol/L)
  S2 = V2

; Binding parameters
TVKD = THETA(7)
  KD = TVKD
 TVN = THETA(8)
   N = TVN

$THETA  (0,1) ; ; EGFRCL
 (0,1) ; _; BWCL
 (0,7) ; __; CL
 (0,40) ; ___; V1
 (0,20) ; ____; V2
 (0,30) ; _____; Q
 (0,0.1) ; ______; KD
 (0,1) ; _______; N
; chech phase 1 trial, SAME order as PK
$OMEGA  0.05  ;   ________  ; not yet known, outcome picked for next models, put a relatively small number
 0.05  ;  _________  ; not yet known, outcome picked for next models
 ;; variance covariance matrix for interindividual variability
$SIGMA  0.1  ; __________  ; EPS(1), proportional error, not yet known, outcome picked for next models
;; variance covariance matrix for residual error
$DES DADT(1) = -K10*A(1) -K12*A(1) +K21*A(2)  ;; ODE for central    compartment
     DADT(2) =            K12*A(1) -K21*A(2)  ;; ODE for peripheral compartment

$ERROR
IPRED_UNBOUND = F
IF (CONC_ID.EQ.2) THEN
   IPRED = IPRED_UNBOUND
ELSE
   IPRED = IPRED_UNBOUND * (1 + (N * ALB)/(KD + IPRED_UNBOUND))
ENDIF

Y = IPRED + IPRED*ERR(1)
W = SQRT(IPRED**2*SIGMA(1,1))
IRES  = CONC - IPRED
IWRES = IRES / W

$ESTIMATION METHOD=1 INTERACTION ;; FOCE-I
            MAXEVAL=9999 SIG=3 PRINT=5
$COVARIANCE PRINT=E UNCONDITIONAL ;; new
 ;; output table for standard outcomes
$TABLE      ID TIME DV EVID PRED CWRES MDV IPRED WRES RES CWRES
            NOPRINT ONEHEADER FILE=run05_sdtab
 ;; output table for PK parameters
$TABLE      ID CL V1 V2 Q K10 K12 K21 KD N NOPRINT NOAPPEND ONEHEADER
            FILE=run05_patab
 ;; output table for categorical covariates
$TABLE      ID SEX ETHNI NOPRINT NOAPPEND ONEHEADER FILE=run05_catab
 ;; output table for continuous covariates
$TABLE      ID BW ALB SCR eGFR AGE NOPRINT NOAPPEND ONEHEADER
            FILE=run05_cotab

NM-TRAN MESSAGES
 WARNINGS AND ERRORS (IF ANY) FOR PROBLEM    1
 (WARNING  2) NM-TRAN INFERS THAT THE DATA ARE POPULATION.
 (WARNING  79) SIGMA IS USED ON THE RIGHT. WITH A SUBSEQUENT RUN, IF AN
 INITIAL ESTIMATE OF A DIAGONAL BLOCK OF SIGMA IS TO BE COMPUTED BY
 NONMEM, THAT BLOCK WILL BE SET TO AN IDENTITY MATRIX DURING THAT
 COMPUTATION. THIS COULD LEAD TO AN ARITHMETIC EXCEPTION.*
 * THE MAXIMUM NUMBER OF WARNINGS OF ONE OR MORE TYPES WAS REACHED.
 IT IS POSSIBLE THAT SOME WARNING MESSAGES WERE SUPPRESSED.
Note: Analytical 2nd Derivatives are constructed in FSUBS but are never used.
      You may insert $ABBR DERIV2=NO after the first $PROB to save FSUBS construction and compilation time

1NONLINEAR MIXED EFFECTS MODEL PROGRAM (NONMEM) VERSION 7.6.0 (nm760)
 ORIGINALLY DEVELOPED BY STUART BEAL, LEWIS SHEINER, AND ALISON BOECKMANN
 CURRENT DEVELOPERS ARE ROBERT BAUER, ICON DEVELOPMENT SOLUTIONS,
 AND ALISON BOECKMANN. IMPLEMENTATION, EFFICIENCY, AND STANDARDIZATION
 PERFORMED BY NOUS INFOSYSTEMS.
 PROBLEM NO.:         1
 CeftriaxPro Base Model Development
 TOT. NO. OF OBS RECS:      992
 TOT. NO. OF INDIVIDUALS:       33
 GENERAL NONLINEAR KINETICS MODEL WITH STIFF/NONSTIFF EQUATIONS (LSODA, ADVAN13)
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 #TBLN:      1
 #METH: First Order Conditional Estimation with Interaction
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
 #TERM:
0MINIMIZATION SUCCESSFUL
 NO. OF FUNCTION EVALUATIONS USED:      365
 NO. OF SIG. DIGITS IN FINAL EST.:  3.1
0PARAMETER ESTIMATE IS NEAR ITS BOUNDARY

 ETABAR IS THE ARITHMETIC MEAN OF THE ETA-ESTIMATES,
 AND THE P-VALUE IS GIVEN FOR THE NULL HYPOTHESIS THAT THE TRUE MEAN IS 0.

 ETABAR:         1.3169E-03  2.4010E-04
 SE:             5.4221E-02  8.9632E-02
 N:                      33          33

 P VAL.:         9.8062E-01  9.9786E-01

 ETASHRINKSD(%)  1.0995E+00  2.6968E+00
 ETASHRINKVR(%)  2.1869E+00  5.3209E+00
 EBVSHRINKSD(%)  1.0086E+00  2.3141E+00
 EBVSHRINKVR(%)  2.0070E+00  4.5747E+00
 RELATIVEINF(%)  9.7987E+01  9.5420E+01
 EPSSHRINKSD(%)  2.8721E+00
 EPSSHRINKVR(%)  5.6618E+00


 TOTAL DATA POINTS NORMALLY DISTRIBUTED (N):          992
 N*LOG(2PI) CONSTANT TO OBJECTIVE FUNCTION:    1823.1740498780705
 OBJECTIVE FUNCTION VALUE WITHOUT CONSTANT:   -7434.5508330463517
 OBJECTIVE FUNCTION VALUE WITH CONSTANT:      -5611.3767831682817
 REPORTED OBJECTIVE FUNCTION DOES NOT CONTAIN CONSTANT

 TOTAL EFFECTIVE ETAS (NIND*NETA):                            66


 #TERE:
 Elapsed estimation  time in seconds:    93.74
0R MATRIX ALGORITHMICALLY SINGULAR
 AND ALGORITHMICALLY NON-POSITIVE-SEMIDEFINITE
0R MATRIX IS OUTPUT
0COVARIANCE STEP ABORTED
 Elapsed covariance  time in seconds:   134.59
 Elapsed postprocess time in seconds:     0.84

 ********************               FIRST ORDER CONDITIONAL ESTIMATION WITH INTERACTION              ********************
 #OBJT:**************                       MINIMUM VALUE OF OBJECTIVE FUNCTION                      ********************
 #OBJV:********************************************         -7434.551       *********************************************

 ********************               FIRST ORDER CONDITIONAL ESTIMATION WITH INTERACTION              ********************
 ********************                             FINAL PARAMETER ESTIMATE                           ********************

 THETA - VECTOR OF FIXED EFFECTS PARAMETERS   *********
         TH 1      TH 2      TH 3      TH 4      TH 5      TH 6      TH 7      TH 8
         1.59E+00  1.00E-02  8.32E+00  5.61E+01  4.40E+01  2.06E+01  4.14E-02  8.40E-01

 OMEGA - COV MATRIX FOR RANDOM EFFECTS - ETAS  ********
         ETA1      ETA2
 ETA1
+        9.92E-02
 ETA2
+        0.00E+00  2.80E-01

 SIGMA - COV MATRIX FOR RANDOM EFFECTS - EPSILONS  ****
         EPS1
 EPS1
+        4.64E-02

 OMEGA - CORR MATRIX FOR RANDOM EFFECTS - ETAS  *******
         ETA1      ETA2
 ETA1
+        3.15E-01
 ETA2
+        0.00E+00  5.29E-01

 SIGMA - CORR MATRIX FOR RANDOM EFFECTS - EPSILONS  ***
         EPS1
 EPS1
+        2.15E-01
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 Elapsed finaloutput time in seconds:     0.07
 #CPUT: Total CPU Time in Seconds,      228.504
